*Heading
** Job name: Job-1 Model name: Model-1
** Generated by: Abaqus/CAE 2025
*Preprint, echo=NO, model=NO, history=NO, contact=NO
**
** PARTS
**
*Part, name=Beam
*Node
      1,         -2.5,           0.
      2,          -2.,           0.
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*Element, type=B21
 1,  1,  2
 2,  2,  3
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*Nset, nset=Set-1, generate
  1,  11,   1
*Elset, elset=Set-1, generate
  1,  10,   1
*Nset, nset=Set-2, generate
  1,  11,   1
*Elset, elset=Set-2, generate
  1,  10,   1
** Section: S2  Profile: S1
*Beam Section, elset=Set-1, material="Beton C20/25", temperature=GRADIENTS, section=RECT
0.4, 0.6
0.,0.,-1.
*End Part
**
*Part, name=Column
*Node
      1,           0.,          1.5
      2,           0.,   1.20000005
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*Element, type=B21
 1,  1,  2
 2,  2,  3
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*Nset, nset=Set-1, generate
  1,  11,   1
*Elset, elset=Set-1, generate
  1,  10,   1
*Nset, nset=Set-2, generate
  1,  11,   1
*Elset, elset=Set-2, generate
  1,  10,   1
** Section: S1  Profile: S1
*Beam Section, elset=Set-1, material="Beton C20/25", temperature=GRADIENTS, section=RECT
0.4, 0.6
0.,0.,-1.
*End Part
**
**
** ASSEMBLY
**
*Assembly, name=Assembly
**
*Instance, name=Beam-1, part=Beam
         2.5,           3.,           0.
*End Instance
**
*Instance, name=Column-1, part=Column
          0.,          1.5,           0.
*End Instance
**
*Instance, name=Column-2, part=Column
          5.,          1.5,           0.
*End Instance
**
*Nset, nset=Set-1, instance=Column-1
 11,
*Nset, nset=Set-1, instance=Column-2
 11,
*Nset, nset=Set-4, instance=Beam-1, generate
  1,  11,   1
*Elset, elset=Set-4, instance=Beam-1, generate
  1,  10,   1
*Nset, nset=m_Set-2, instance=Beam-1, generate
  1,  11,   1
*Elset, elset=m_Set-2, instance=Beam-1, generate
  1,  10,   1
*Nset, nset=s_Set-2, instance=Column-1, generate
  1,  11,   1
*Nset, nset=s_Set-2, instance=Column-2, generate
  1,  11,   1
*Elset, elset=s_Set-2, instance=Column-1, generate
  1,  10,   1
*Elset, elset=s_Set-2, instance=Column-2, generate
  1,  10,   1
*Surface, type=NODE, name=m_Set-2_CNS_, internal
m_Set-2, 1.
*Surface, type=NODE, name=s_Set-2_CNS_, internal
s_Set-2, 1.
** Constraint: Constraint-1
*Tie, name=Constraint-1, adjust=yes, position tolerance=0.01
s_Set-2_CNS_, m_Set-2_CNS_
*End Assembly
*Amplitude, name=Amp-1
             0.,              0.,            0.01,      0.12533076,            0.02,     0.248670252,            0.03,     0.368059156
           0.04,     0.481601531,            0.05,     0.587495216,            0.06,     0.684060716,            0.07,     0.769768106
           0.08,     0.843261503,            0.09,     0.903380732,             0.1,     0.949179824,            0.11,     0.979942046
           0.12,     0.995191235,            0.13,     0.994699235,            0.14,     0.978489344,            0.15,     0.946835694
           0.16,     0.900258596,            0.17,     0.839515924,            0.18,     0.765590673,            0.19,     0.679674913
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           9.96,    -0.481601531,            9.97,    -0.368059156,            9.98,    -0.248670252,            9.99,     -0.12533076
**
** MATERIALS
**
*Material, name="Beton C20/25"
*Density
 0.0025,
*Elastic
 26171.1, 0.2
**
** BOUNDARY CONDITIONS
**
** Name: BC-1 Type: Displacement/Rotation
*Boundary
Set-1, 1, 1
Set-1, 2, 2
** ----------------------------------------------------------------
**
** STEP: Step-1
**
*Step, name=Step-1, nlgeom=YES
*Static
1., 1., 1e-05, 1.
**
** LOADS
**
** Name: Load-Gravity   Type: Gravity
*Dload
, GRAV, 10., 0., -1.
**
** OUTPUT REQUESTS
**
*Restart, write, frequency=0
**
** FIELD OUTPUT: F-Output-1
**
*Output, field, variable=PRESELECT
**
** HISTORY OUTPUT: H-Output-1
**
*Output, history, variable=PRESELECT
*End Step
** ----------------------------------------------------------------
**
** STEP: Step-2
**
*Step, name=Step-2, nlgeom=YES
*Dynamic
10.,10.,0.0001
**
** BOUNDARY CONDITIONS
**
** Name: BC-2 Type: Acceleration/Angular acceleration
*Boundary, type=ACCELERATION
Set-4, 1, 1, 1.
**
** OUTPUT REQUESTS
**
*Restart, write, frequency=0
**
** FIELD OUTPUT: F-Output-1
**
*Output, field, variable=PRESELECT, frequency=1
**
** HISTORY OUTPUT: H-Output-1
**
*Output, history, variable=PRESELECT, frequency=1
*End Step
